// SBML level 3 version 1

model main()
  // model units - substance: mole, time: second, volume: litre, area: square_metre, length: metre, extent: mole

  // Compartments:
  compartment default = 1e-6;

  // Species:
  species E in default = 35;
  species D in default = 16;
  species C in default = 95;
  species B in default = 95;
  species A in default = 27;
  species F in default = 71;
  species G in default = 60;

  // Parameters:
  DummyVar_NegativeProportionalHillPropensity_k_0 = 0.312;
  DummyVar_NegativeProportionalHillPropensity_K_1 = 0.586;
  DummyVar_NegativeProportionalHillPropensity_n_2 = 2.511;
  DummyVar_MassActionPropensity_k_3 = 0.372;

  // Reactions:
  r0: D + E => ; DummyVar_NegativeProportionalHillPropensity_k_0*C/(C^DummyVar_NegativeProportionalHillPropensity_n_2 + DummyVar_NegativeProportionalHillPropensity_K_1);
  r1: D + B + C => D + C; DummyVar_MassActionPropensity_k_3*D*B*C;

  // Unit definitions:
  unit square_metre = metre^2;
end
